*HEADING
HVD voxel model matching the internal H8 FEM discretization
**
*DISTRIBUTION TABLE, NAME=HVD_ORIENTATION_TABLE
COORD3D, COORD3D
**
*PART, NAME=HVD_VOXEL
*NODE
1, -23.627053657, -0.734328371603, -0.415951106081
2, -23.627053657, -0.457027700883, -0.415951106081
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*ELEMENT, TYPE=C3D8, ELSET=ALL_ACTIVE
1, 1, 12, 13, 2, 5067, 5082, 5083, 5068
2, 2, 13, 14, 3, 5068, 5083, 5084, 5069
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*DISTRIBUTION, NAME=HVD_ORIENTATION_FIELD, LOCATION=ELEMENT, TABLE=HVD_ORIENTATION_TABLE
, 1., 0., 0., 0., 1., 0.
1, 0.050375423865, -0.998730352333, 0, 0.998730352333, 0.050375423865, 0
2, 0.050375424582, -0.998730352296, 0, 0.998730352296, 0.050375424582, 0
3, 0.0348473474805, -0.999392646748, 0, 0.999392646748, 0.0348473474805, -0
4, -0.0503753569799, -0.998730355706, 0, 0.998730355706, -0.0503753569799, 0
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14615, -0.870853661567, 0.491542368606, 0, -0.491542368606, -0.870853661567, 0
*ORIENTATION, NAME=HVD_ORIENTATION, DEFINITION=COORDINATES, SYSTEM=RECTANGULAR
HVD_ORIENTATION_FIELD
3, 0.
*ELSET, ELSET=HVD_BIN_000
27, 28, 29, 30, 31, 32
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*SOLID SECTION, ELSET=HVD_BIN_000, MATERIAL=HVD_MAT_000, ORIENTATION=HVD_ORIENTATION
,
*ELSET, ELSET=HVD_BIN_001
1, 2, 3, 4, 5, 6
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*SOLID SECTION, ELSET=HVD_BIN_001, MATERIAL=HVD_MAT_001, ORIENTATION=HVD_ORIENTATION
,
*END PART
**
*MATERIAL, NAME=HVD_MAT_000
*ELASTIC, TYPE=ENGINEERING CONSTANTS
17.7829755893, 1.77829755893, 1.77829755893, 0.3, 0.3, 0.3, 1.14319128788, 1.14319128788
0.683960599589
*DENSITY
1.05705474781e-11
*MATERIAL, NAME=HVD_MAT_001
*ELASTIC, TYPE=ENGINEERING CONSTANTS
54894.6560238, 5489.46560238, 5489.46560238, 0.3, 0.3, 0.3, 3528.94217296, 3528.94217296
2111.33292399
*DENSITY
1.35884782453e-09
**
*ASSEMBLY, NAME=ASSEMBLY
*INSTANCE, NAME=HVD_VOXEL-1, PART=HVD_VOXEL
*END INSTANCE
*END ASSEMBLY
**
*STEP, NAME=STATIC_LOAD, NLGEOM=NO
*STATIC
0.1, 1.0, 1.0e-08, 0.1
*BOUNDARY
HVD_VOXEL-1.4911, 1, 1, 0.
HVD_VOXEL-1.4911, 2, 2, 0.
HVD_VOXEL-1.4911, 3, 3, 0.
HVD_VOXEL-1.4912, 1, 1, 0.
HVD_VOXEL-1.4912, 2, 2, 0.
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HVD_VOXEL-1.20608, 3, 3, 0.
*CLOAD
HVD_VOXEL-1.5578, 1, -0.405528860271
HVD_VOXEL-1.5627, 1, -0.270966694237
HVD_VOXEL-1.10819, 1, -0.87451151192
HVD_VOXEL-1.10820, 1, -0.487725673953
HVD_VOXEL-1.10821, 1, -0.487725673953
HVD_VOXEL-1.10822, 1, -1.28004037219
HVD_VOXEL-1.10868, 1, -0.413230018973
HVD_VOXEL-1.10873, 1, -0.68419671321
HVD_VOXEL-1.10919, 1, -0.0480372406461
HVD_VOXEL-1.10922, 1, -0.0480372406461
*OUTPUT, FIELD, FREQUENCY=1
*NODE OUTPUT
U, RF,S
*ELEMENT OUTPUT, POSITION=INTEGRATION POINTS, DIRECTIONS=YES
S
*OUTPUT, HISTORY, FREQUENCY=1
*ENERGY OUTPUT
ALLIE, ALLSE
*END STEP
